*Heading
** Job name: TMF-Block Model name: Model-1
** Generated by: Abaqus/CAE 6.14-2
*Preprint, echo=NO, model=NO, history=NO, contact=NO
**
** PARTS
**
*Part, name=Block
*End Part
**
**
** ASSEMBLY
**
*Assembly, name=Assembly
**
*Instance, name=Block-1, part=Block
*Node
      1,         -25.,         -25.,          50.
      2,         -25.,  -8.33333302,          50.
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*Element, type=C3D8
 1, 17, 18, 22, 21,  1,  2,  6,  5
 2, 18, 19, 23, 22,  2,  3,  7,  6
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*Nset, nset=Set-1, generate
  1,  64,   1
*Elset, elset=Set-1, generate
  1,  27,   1
** Section: Section-1
*Solid Section, elset=Set-1, material=Austenite-011
,
*End Instance
**
*Nset, nset=Set-1, instance=Block-1, generate
  1,  61,   4
*Elset, elset=Set-1, instance=Block-1, generate
  1,  25,   3
*Nset, nset=Set-2, instance=Block-1, generate
  1,  49,  16
*Elset, elset=Set-2, instance=Block-1, generate
  1,  19,   9
*Nset, nset=Set-3, instance=Block-1, generate
 49,  61,   4
*Elset, elset=Set-3, instance=Block-1, generate
 19,  25,   3
*Nset, nset=Set-4, instance=Block-1, generate
  4,  64,   4
*Elset, elset=Set-4, instance=Block-1, generate
  3,  27,   3
*Nset, nset=Set-6, instance=Block-1, generate
  1,  64,   1
*Elset, elset=Set-6, instance=Block-1, generate
  1,  27,   1
*End Assembly
**
** MATERIALS
**
*Material, name=Austenite-011
*Depvar
    200,
*User Material, constants=4
4., 0.785398,       0.,       0.
**
** Define frequency and amplitude of load-temperature cycles
*Amplitude, name=Amp-disp, time=TOTAL TIME
 0., 0.,       5.0, -1.0,      10.0, 1.0,      20., -1.0

*Amplitude, name=Amp-temp, time=TOTAL TIME, value=ABSOLUTE
 0., 923.0,    5.0, 1023.0,    10.0, 823.0,    20.0, 1023.0
**
** PREDEFINED FIELDS
**
** Name: Predefined Field-1   Type: Temperature
*Initial Conditions, type=TEMPERATURE
Set-6, 923.0
**
** BOUNDARY CONDITIONS
**
** Name: BC-1 Type: Displacement/Rotation
*Boundary
Set-1, 2, 2
** Name: BC-2 Type: Displacement/Rotation
*Boundary
Set-2, 3, 3
** Name: BC-3 Type: Displacement/Rotation
*Boundary
Set-3, 1, 1
** ----------------------------------------------------------------
**
** STEP: Step-1
**
*Step, name=Step-1, nlgeom=YES, inc=1000000, solver=iterative
*Static
0.05, 20., 1e-05, 0.1
**
** BOUNDARY CONDITIONS
**
** Name: BC-4 Type: Displacement/Rotation
*Boundary, amplitude=Amp-disp
Set-4, 2, 2, 0.5
**
** PREDEFINED FIELDS
**
** Name: Predefined Field-1   Type: Temperature
*Temperature, op=NEW, amplitude=Amp-temp
Set-6, 923
**
** OUTPUT REQUESTS
**
*Restart, write, frequency=0
**
** FIELD OUTPUT: F-Output-1
**
*Output, field, variable=PRESELECT, time interval=1.0
*Node Output, nset=Set-6
U, RF, COORD, CF
*Node Output
CF, RF, U
*Element Output, directions=YES
LE, PE, PEEQ, PEMAG, S, SDV, TEMP
**
** HISTORY OUTPUT: H-Output-1
**
*Output, history, variable=PRESELECT, time interval=1.0
**
*End Step
